*Heading
*Preprint, echo=NO, model=NO, history=NO, contact=NO
**
** PARTS
**
*Part, name=beam
*Node
      1,         -10.,         -30.,         500.
      2,         -10.,         -10.,         500.
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*Element, type=C3D10
  1,  85,  15,  54,  16, 105, 104, 103, 107, 106, 108
  2,  85,  39,  86,  77, 111, 110, 109, 113, 112, 114
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*Nset, nset=solid, generate
   1,  518,    1
*Elset, elset=solid, generate
   1,  233,    1
** Section: solid
*Solid Section, elset=solid, material=steel
,
*End Part
**
**
** ASSEMBLY
**
*Assembly, name=Assembly
**
*Instance, name=beam-1, part=beam
*End Instance
**
*Nset, nset=fixed, instance=beam-1
   3,   4,   6,   7, 293, 395, 511, 512, 514
*Elset, elset=fixed, instance=beam-1
 206, 211
*End Assembly
**
** MATERIALS
**
*Material, name=steel
*Density
 7.85e-09,
*Elastic
208000., 0.3
** ----------------------------------------------------------------
**
**
*Step
*MATRIX GENERATE, MASS, STIFFNESS
*MATRIX OUTPUT, STIFFNESS, MASS, FORMAT=COORDINATE
** Name: fixed Type: Displacement/Rotation
*Boundary
fixed, 1, 1
fixed, 2, 2
fixed, 3, 3
**
*End Step
